Clear
Set DefaultBaseFrequency=60
Set DataPath=D:\projetos\opendss\trab\934

Redirect ieee37.dss
BusCoords IEEE37_BusXY.csv

Redirect pvsystem.dss

New EnergyMeter.M_ilha element=Line.L17 terminal=2
!Solve Loadmult=0.5
Set Loadmult=1

Set VoltageBases = "230,4.8,0.48"
CalcVoltageBases

New LoadShape.dispatch_shape interval=1 npts=24 mult=(file=curva_bess.txt)
New XYCurve.Eff npts=4 xarray=[.1        .2        .4        1.0]  yarray=[.86        .9        .93        .97]

New Storage.Storage phases=3 bus1=BESS_BUS kv=0.38 pf=1 kWrated=150 %reserve=20  // kv anterior kv=13.8 effcurve=Eff kWhrated=314 %stored=20 state=idling conn=delta dispmode=follow model=1 daily=dispatch_shape

New InvControl.StoCtrl DERList=[Storage.mystorage PVSystem.myPV]
mode=GFM
edit storage.mystorage State = Discharging ControlMode = GFM
Open Line.L17 Term=1


new monitor.line_ilhamento_potencia element=Line.L1 terminal=1 mode=1
new monitor.line_ilhamento_VI element=Line.L1 terminal=1 mode=0
new monitor.sto_ilhamento_potencia element=storage.storage terminal=1 mode=1
new monitor.sto_ilhamento_vi element=storage.storage terminal=1 mode=0
new monitor.sto_ilhamento_variables element=storage.storage terminal=1 mode=3

!new monitor.line_ilhamento_potencia element=Line.L1 terminal=1 mode=1
!new monitor.line_ilhamento_VI element=Line.L1 terminal=1 mode=0
!new monitor.line_ilhamento_variables element=Line.L1 terminal=1 mode=3
!new monitor.pvsystem_ilhamento_potencia element=Line.L1 terminal=1 mode=1
!new monitor.pvsystem_ilhamento_VI element=Line.L1 terminal=1 mode=0
!new monitor.pvsystem_ilhamento_variables element=Line.L1 terminal=1 mode=3

Set DataPath=D:\projetos\opendss\trab\934\resultados\ilhamento
set mode=daily
set number=24
Set Stepsize=1h

set DemandInterval=true
set overloadreport=true
set voltexceptionreport=true
set DIVerbose=true
solve
closeDI


!Set DataPath=C:\Users\amy\projects\opendss\trab\resultados\ilhamento

Export Voltages voltages.csv
Export Overloads overloads.csv
Export monitor line_ilhamento_potencia
Export monitor line_ilhamento_VI
Export monitor sto_ilhamento_potencia
Export monitor sto_ilhamento_vi
Export monitor sto_ilhamento_variables

!Set DataPath=C:\Users\amy\projects\opendss\trab


export monitor pv1_variables
export monitor pv2_variables
export monitor pv3_variables
export monitor pv4_variables
export monitor pv5_variables
export monitor pv6_variables
export monitor pv7_variables
export monitor pv8_variables


export monitor pv1_potencia
export monitor pv2_potencia
export monitor pv3_potencia
export monitor pv4_potencia
export monitor pv5_potencia
export monitor pv6_potencia
export monitor pv7_potencia
export monitor pv8_potencia
